// COMSOL Multiphysics 6.0.0.405 model "blasius boundary layer - without Run.mph"
// Outline of the model tree
// Components: comp1 "Component 1", comp2 "Component 2"

Parameters
  U0 = 0.75[m/s]  // Inlet velocity
  nu = 1.506137e-5[m^2/s]  // Kinematic viscosity
  xE = 2[m]  // Evaluation location
  b0 = nu/U0  // B-L scale
  N = 1  // Mesh refinement factor

Couplings
  genext1: GeneralExtrusion on domains 1 | dstmap = root.y/sqrt(b0*root.x); srcmap = x

Geometry
  geom1 "Geometry 1" [comp1] (1D, length unit m)
    i1: Interval | coord = {0, 10}
    fin: Finalize "Form Union"
  geom2 "Geometry 2" [comp2] (2D, length unit m)
    r1: Rectangle | pos = {-1, 0}; size = {3.1, 0.5}
    pt1: Point
    pt2: Point | p = {, 0.5}
    fin: Finalize "Form Union"

Materials
  mat1: Common "Air" [comp2] on all domains
    def "Basic"
      thermalexpansioncoefficient = alpha_p(pA,T)
      molarmass = 0.02897[kg/mol]
      bulkviscosity = muB(T)
      relpermeability = 1
      relpermittivity = 1
      dynamicviscosity = eta(T)
      ratioofspecificheat = 1.4
      electricconductivity = 0[S/m]
      heatcapacity = Cp(T)
      density = rho(pA,T)
      thermalconductivity = k(T)
      soundspeed = cs(T)
      eta: Piecewise | arg = T; pieces = {200.0, 1600.0, -8.38278E-7+8.35717342E-8*T^1-7.69429583E-11*T^2+4.6437266E-14*T^3-1.06585607E-17*T^4}; argunit = K; fununit = Pa*s
      Cp: Piecewise | arg = T; pieces = {200.0, 1600.0, 1047.63657-0.372589265*T^1+9.45304214E-4*T^2-6.02409443E-7*T^3+1.2858961E-10*T^4}; argunit = K; fununit = J/(kg*K)
      rho: Analytic | expr = pA*0.02897/R_const[K*mol/J]/T; args = {pA, T}; fununit = kg/m^3; argunit = {Pa, K}
      k: Piecewise | arg = T; pieces = {200.0, 1600.0, -0.00227583562+1.15480022E-4*T^1-7.90252856E-8*T^2+4.11702505E-11*T^3-7.43864331E-15*T^4}; argunit = K; fununit = W/(m*K)
      cs: Analytic | expr = sqrt(1.4*R_const[K*mol/J]/0.02897*T); args = T; fununit = m/s; argunit = K
      an1: Analytic | funcname = alpha_p; expr = -1/rho(pA,T)*d(rho(pA,T),T); args = {pA, T}; fununit = 1/K; argunit = {Pa, K}
      an2: Analytic "Analytic 2a" | funcname = muB; expr = 0.6*eta(T); args = T; fununit = Pa*s; argunit = K
    RefractiveIndex
      n = 1
      ki = 0
    NonlinearModel
      BA = (def.gamma+1)/2
    idealGas
      Rs = R_const/Mn
      heatcapacity = Cp(T)
      ratioofspecificheat = 1.4
      molarmass = 0.02897
      Cp: Piecewise | arg = T; pieces = {200.0, 1600.0, 1047.63657-0.372589265*T^1+9.45304214E-4*T^2-6.02409443E-7*T^3+1.2858961E-10*T^4}; argunit = K; fununit = J/(kg*K)

Physics
  c: CoefficientFormPDE [geom1] on all domains
    dependent variable f = {f, fprime}
    cfeq1: CoefficientFormPDE (default)
      c = {0, 0, 0, -2}
      a = {0, 0, 1, 0}
      f = {0, 0}
      da = {0, 0, 0, 0}
      be = {-1, 0, 0, f}
    zflx1: ZeroFluxBoundary "Zero Flux 1" (default)
    init1: init "Initial Values 1" (default)
    dir1: DirichletBoundary "Dirichlet Boundary Condition 1" on boundaries 1 | r = {0, 0}
    dir2: DirichletBoundary "Dirichlet Boundary Condition 2" on boundaries 2 | r = {0, 1}; useDirichletCondition = {0, 1}
  spf: LaminarFlow [geom2] on all domains
    dependent variable u = {u, v, w}
    fp1: FluidProperties (default)
    init1: init "Initial Values 1" (default)
    wallbc1: WallBC "Wall 1" (default)
    inl1: InletBoundary "Inlet 1" on boundaries 1 | U0in = U0
    open1: OpenBoundary on boundaries 3, 5
    out1: OutletBoundary "Outlet 1" on boundaries 6
    sym1: Symmetry on boundaries 2

Mesh
  mesh1 "Mesh 1" [geom1]
    size: MeshSizeDefault | hmax = 0.67; hmin = 0.003; hcurve = 0.3; hgrad = 1.3
    edg1: Edge on entire geometry
      dis1: Distribution on domains 1 | type = predefined; elemcount = 10000; elemratio = 100; growthrate = exponential
  mesh2 "Mesh 2" [geom2]
    size: MeshSizeDefault | hmax = 0.208; hmin = 9.3E-4; hcurve = 0.3; hgrad = 1.3
    map1: Map "Mapped 1" on remaining entities
      dis1: Distribution on boundaries 4, 5 | numelem = 21*N
      dis2: Distribution on boundaries 2, 3 | numelem = 10*N
      dis3: Distribution on boundaries 1, 6
        type = predefined
        elemcount = 20*N
        elemratio = 15
        growthrate = exponential

Studies
  std1 "Similarity Solution"
    stat: Stationary
  std2 "Study 2"
    param: Parametric "Parametric Sweep" | pname = N; plistarr = 1 2 4
    stat: Stationary | usesol = on; notsolmethod = sol; notstudy = std1

Solver configurations
  sol1 "Solution 1" (study std1)
    v1: Variables "Dependent Variables 1"
    s1: Stationary "Stationary Solver 1" | stol = 1e-6
      dDef: Direct | mumpsalloc = 1.5
      fc1: FullyCoupled | linsolver = dDef
  sol2 "Solution 2" (study std2)
    v1: Variables "Dependent Variables 1"
    s1: Stationary "Stationary Solver 1" | stol = 1e-5
      fc1: FullyCoupled | linsolver = d1; initstep = 0.01; maxiter = 50
      d1: Direct

Datasets
  dset1: Solution | solution = sol1
  dset2: Solution | solution = sol2
  dset3: Solution | solution = sol2
  cln1: CutLine2D | data = dset3; genpoints = {{xE, 0}, {xE, 10*sqrt(b0*xE)}}

Derived values
  int1: IntLine "Line Integration 1"
    data = cln1
    table = tbl1
    expr = (u/U0-comp1.genext1(fprime))^2/sqrt(b0*x)
    descr = Err^2
  min1: MinSurface "Surface Minimum 1" on domains 1 | data = dset3; table = tbl1; expr = 1/h

Tables
  tbl1: Table
    // Line Integration 1
    1/h (1/m) | Err^2 (1)
    10 | 0.00364017
  tbl2: Table
    // Surface Minimum 1
    1/h (1/m)
    10

Plots
  pg1: PlotGroup1D "1D Plot Group 1" | data = dset1; xlabel = \eta; ylabel = u/U0
    lngr1: LineGraph on all domains | expr = fprime; xdata = expr; xdataexpr = x; legends = Similarity Solution
    lngr2: LineGraph | data = cln1; expr = u/U0; xdata = expr; xdataexpr = y/sqrt(b0*x)
  pg2: PlotGroup1D "1D Plot Group 2"
    data = dset2
    title = Blasius Boundary Layer Thickness
    xlabel = u/Uo
    ylabel = y*sqrt(Uo/nx)
    lngr1: LineGraph on all domains | expr = f; xdata = expr; xdataexpr = x
  pg3: PlotGroup2D "Velocity (spf)" | data = dset3
    surf1: Surface (disabled) | expr = spf.U
    con1: Contour | expr = spf.U
  pg4: PlotGroup2D "Pressure (spf)" | data = dset3
    con1: Contour | expr = p; levelrounding = off
  pg5: PlotGroup1D "1D Plot Group 5" | data = none
    tblp1: Table "Table Graph 1" | table = tbl1; xaxisdata = 2; plotcolumninput = manual; plotcolumns = 1